// SBML level 3 version 2

model biocrnpyler_408803()
  // model units - substance: mole, time: second, volume: litre, area: square_metre, length: metre, extent: mole

  // Compartments:
  compartment default = 1e-6;

  // Species:
  species dna_Input_1 in default = 0;
  species rna_Input_1 in default = 0;
  species dna_Gate_1_2 in default = 0;
  species rna_Gate_1_2_pre in default = 0;
  species rna_Output_1_2_dummy in default = 0;
  species rna_Gate_1_2 in default = 0;
  species rna_Output_1_2 in default = 0;
  species dna_Signal_2_ss in default = 0;
  species rna_GateOut_1_1 in default = 0;
  species dna_Reporter_2 in default = 0;
  species rnadna_ReporterOut_2 in default = 0;

  // Parameters:
  ktx__ = 0.013;
  kmat__ = 0.00417;
  kx__ = 1e-6;
  krev__ = 2.7e-7;
  krep__ = 1e-5;

  // Reactions:
  r0: dna_Input_1 => dna_Input_1 + rna_Input_1; ktx__*dna_Input_1;
  r1: dna_Gate_1_2 => dna_Gate_1_2 + rna_Gate_1_2_pre + rna_Output_1_2_dummy; ktx__*dna_Gate_1_2;
  r2: rna_Gate_1_2_pre => rna_Gate_1_2; kmat__*rna_Gate_1_2_pre;
  r3: rna_Gate_1_2 + rna_Input_1 => rna_Output_1_2 + rna_GateOut_1_1; kx__*rna_Gate_1_2*rna_Input_1;
  r3rev: rna_Output_1_2 + rna_GateOut_1_1 => rna_Gate_1_2 + rna_Input_1; krev__*rna_Output_1_2*rna_GateOut_1_1;
  r4: rna_Output_1_2 + dna_Reporter_2 => dna_Signal_2_ss + rnadna_ReporterOut_2; krep__*rna_Output_1_2*dna_Reporter_2;
  r5: 3 rna_Gate_1_2_pre + 100 rna_Output_1_2_dummy => 3 rna_Output_1_2; k_forward*rna_Gate_1_2_pre^3*rna_Output_1_2_dummy^100;
    k_forward = 0.026;

  // Unit definitions:
  unit square_metre = metre^2;
end
